// COMSOL Multiphysics 6.3.0.290 model "CAD2comsol.mph"
// Outline of the model tree

Geometry
  geom1 "Geometry 1" (3D, length unit mm)
    imp1: Import (disabled)
      type = cad
      filename = D:\code\NN_molecular_communications\Section_IV_BioComputing\COMSOL_3_pipes_w_100um_rectangular_tetrazine\CAD_design\Design_1_1_Transmitter_CNN.dxf
      faceangle = 1.91986217719
      neighangle = 0.349065850399
      planarangle = 0.010471975512
      extrangle = 0.010471975512
      facecurv = 0.174532925199
      lengthunittype = cad
      assemblycomponentstype = cad
      virtualgeometrytype = cad
      objectstoimporttype = cad
      fillholes = on
      keepfree = on
      unitecurves = off
      layerstype = cad
      drillholestype = cad
      componentsstype = cad
      compattrtag = imp1.component
      cellstype = cad
      arcrecognitiontype = cad
      arcminangle = 0.0628318530718
      arcmaxangle = 0.628318530718
      simplifytype = cad
      cadtype = DXF
      contangletol = 5[deg]
    uni1: Union (disabled) | input = imp1; keep = on
    wp1: WorkPlane | unite = on; workplane3d = off
      imp1: Import
        type = dxf
        filename = D:\code\NN_molecular_communications\Section_IV_BioComputing\COMSOL_3_pipes_w_100um_rectangular_tetrazine\CAD_design\Design_1_1_Transmitter_CNN.dxf
        lengthunittype = dxf
        virtualgeometrytype = dxf
        objectstoimporttype = dxf
        layerstype = dxf
        componentsstype = dxf
        compattrtag = imp1.component
        cellstype = dxf
        arcrecognitiontype = dxf
        arcminangle = 0.0628318530718
        arcmaxangle = 0.628318530718
        simplifytype = dxf
        knit = curve
        contangletol = 5[deg]
      uni1: Union | input = imp1(2)
      r1: Rectangle | size = {21.6130515978, 32.20488629}; pos = {-64.1920059036, -19.7849832545}
      dif1: Difference | input = uni1; input2 = r1
      r2: Rectangle "outlet_rectangle" | size = {7.56063776, 3.36755274052}; pos = {-21.3880381317, -0.185656873678}
      coi2: Coincident | entity1 = r2(1) points 1; entity2 = dif1(1) boundaries 16
      dif2: Difference | input = dif1; input2 = r2
      r3: Rectangle "outlet_rectangle2" | size = {2, 2}; pos = {-21.3880381317, 1}
      dif3: Difference | input = imp1(1); input2 = r3
      pol1: Polygon
        type = open
        source = table
        table = 
          {-21.3880381317, 1.78552291508}
          {-20.8, 1.78552291508}
          {-20.8, 1.62260677344}
          {-21.3880381317, 1.62260677344}
      coi3: Coincident | entity1 = pol1(1) points 1; entity2 = dif2(1) points 14
      coi4: Coincident | entity1 = pol1(1) points 4; entity2 = dif2(1) points 13
      ls1: LineSegment | vertex1 = dif2(1) points 2; vertex2 = dif2(1) points 1
      csol1: ConvertToSolid | input = dif2, ls1, pol1
      pol2: Polygon
        source = table
        table = 
          {-42.07993812, 1.81462473}
          {-31.86063776, 11.98197646}
          {-21.6413374, 1.81462473}
          {-42.07993812, 1.81462473}
      coi5: Coincident | entity1 = pol2(1) points 1; entity2 = csol1(1) points 5
      coi6: Coincident | entity1 = pol2(1) points 2; entity2 = csol1(1) points 9
      coi7: Coincident | entity1 = pol2(1) points 3; entity2 = csol1(1) points 12
      pol3: Polygon
        source = table
        table = 
          {-42.0694763, 1.60290393}
          {-21.65179922, 1.60290393}
          {-31.86063776, -12.05591072}
          {-42.0694763, 1.60290393}
      coi8: Coincident | entity1 = pol3(1) points 1; entity2 = csol1(1) points 6
      coi9: Coincident | entity1 = pol3(1) points 2; entity2 = csol1(1) points 11
      coi10: Coincident | entity1 = pol3(1) points 3; entity2 = csol1(1) points 8
      dif4: Difference | input = csol1; input2 = pol2, pol3
    ext2: Extrude | workplane = wp1; input = wp1; distance = 50[um]
    fin: Finalize "Form Union"

Materials
  mat1: Common "H2O (water) [liquid]" on all domains
    def: def "Basic"
      thermalconductivity = k_liquid_2(T)
      thermalexpansioncoefficient = (alpha_liquid_2(T)+(Tempref-293[K])*if(abs(T-Tempref)>1e-3,(alpha_liquid_2(T)-alpha_liquid_2(Tempref))/(T-Tempref),d(alpha_liquid_2(T),T)))/(1+alpha_liquid_2(Tempref)*(Tempref-293[K]))
      heatcapacity = C_liquid_2(T)
      HC = HC_liquid_2(T)
      VP = VP_liquid_2(T)
      density = rho_liquid_2(T)
      TD = TD_liquid_2(T)
      dynamicviscosity = eta_liquid_1(T)
      SurfF = SurfF(T)
      k_liquid_2: Piecewise | arg = T; pieces = {275.0, 370.0, -0.9003748+0.008387698*T^1-1.118205E-5*T^2}; argunit = K; fununit = W/(m*K)
      alpha_liquid_2: Piecewise
        arg = T
        pieces = 
          {273.15, 283.0, 0.01032507-7.62815E-5*T^1+1.412474E-7*T^2}
          {283.0, 373.16, -0.002464189354+1.947611E-5*T^1-5.049672E-8*T^2+4.616995E-11*T^3}
        argunit = K
        fununit = 1/K
      C_liquid_2: Piecewise | arg = T; pieces = {293.0, 373.16, 4035.840794+0.4923120336*T^1}; argunit = K; fununit = J/(kg*K)
      HC_liquid_2: Piecewise | arg = T; pieces = {293.0, 373.16, 72.6451184+0.008861615768*T^1}; argunit = K; fununit = J/(mol*K)
      VP_liquid_2: Piecewise | arg = T; pieces = {280.0, 600.0, (exp((-2.005121830e+03/T-5.565700000e-01*log10(T)+9.898790000e+00-1.111690086e+07/T^3)*log(10.0)))*1.333200000e+02}; argunit = K; fununit = Pa
      rho_liquid_2: Piecewise
        arg = T
        pieces = 
          {273.15, 283.0, 972.7578145+0.2084*T^1-4.0E-4*T^2}
          {283.0, 373.16, 345.28+5.749816*T^1-0.0157244*T^2+1.264375E-5*T^3}
        argunit = K
        fununit = kg/m^3
      TD_liquid_2: Piecewise | arg = T; pieces = {273.15, 333.16, 8.04E-8+2.0E-10*T^1}; argunit = K; fununit = m^2/s
      eta_liquid_1: Piecewise | arg = T; pieces = {265.0, 423.16, exp(1.47297892E+11/T^4 - 1.56916127E+09/T^3 + 6.52798499E+06/T^2 - 1.10421451E+04/T - 2.86320560E+00)}; argunit = K; fununit = Pa*s
      SurfF: Piecewise
        arg = T
        pieces = 
          {274.0, 568.0, 0.0774685638+2.071003E-4*T^1-1.23147E-6*T^2+2.344068E-9*T^3-3.033107E-12*T^4+1.758716E-15*T^5}
          {568.0, 647.0, -109.3735+0.9291756*T^1-0.003154159*T^2+5.351438E-6*T^3-4.539449E-9*T^4+1.540327E-12*T^5}
        argunit = K
        fununit = N/m
    ThermalExpansion: ThermalExpansion
      alphatan = CTE_liquid_2(T)
      dL = (dL_liquid_2(T)-dL_liquid_2(Tempref))/(1+dL_liquid_2(Tempref))
      dL_liquid_2: Piecewise
        arg = T
        pieces = 
          {273.15, 283.0, 0.008486347802-6.947021E-5*T^1+1.333373E-7*T^2}
          {283.0, 373.16, 0.2324466367-0.002030447*T^1+5.510259E-6*T^2-4.395999E-9*T^3}
        argunit = K
      CTE_liquid_2: Piecewise
        arg = T
        pieces = 
          {273.15, 283.0, -6.947321E-5+2.666746E-7*T^1}
          {283.0, 293.0, -0.01363714988+8.893977E-5*T^1-1.43925E-7*T^2}
          {293.0, 373.16, -0.002030450346+1.102052E-5*T^1-1.3188E-8*T^2}
        argunit = K
        fununit = 1/K

Physics
  tds: DilutedSpecies "Transport of Diluted Species" on all domains
    dependent variable c
    cdm1: Fluid (default)
    nflx1: NoFlux (default)
    init1: init "Initial Values 1" (default)
    in1: Inflow on boundaries 1
    out1: Outflow on boundaries 18
  spf: LaminarFlow on all domains
    dependent variable u = {u, v, w}
    fp1: FluidProperties (default)
    init1: init "Initial Values 1" (default)
    wallbc1: WallBC "Wall 1" (default)

Multiphysics
  rfd1: ReactingFlowDS "Reacting Flow, Diluted Species 1" on all domains | Fluid_physics = spf; Species_physics = tds

Mesh
  mesh1 "Mesh 1" (physics-controlled)

Studies
  std1 "Study 1"
    time: Transient "Time Dependent" | tlist = range(0,0.1,1)