// COMSOL Multiphysics 6.3.0.290 model "COMSOL_2D_Pipe_1_to_simulate.mph"
// Outline of the model tree

Parameters
  c_CH3COOH_ini = 1[mol/L]  // Initial concentration at the inlet of the pipe.
  c_CH3COONa_ini = 0  // Initial concentration of the reaction product.
  c_H2O_ini = 0  // Initial concentration of water. It is zero as it is a produce of the reaction.
  c_Na = 10[mol/m^3]  // concentration of species.
  c_NaOH_ini = 1000[mol/m^3]  // Initial concentration at the inlet of the chemical chamber in the units of mol/m^3.
  D_CH3COOH = 1.22*10^(-5)[cm^2/s]  // Diffusion coeff of Acetic Acid in water.
  D_CH3COONa = 1.09*10^(-5)[cm^2/s]  // Diffusion coeff of Sodium Acid in water.
  D_H2O = 2.29*10^(-9)[cm^2/s]  // Diffusion coeff of water in water.
  d_Na = 358[pm]  // Diameter of Sodium
  D_Na = 1.33e-9[m^2/s]  // Diffusion coeff of Na in H2O.
  D_NaOH = 5.3*10^(-9)[m^2/s]  // Diffusion coeff of Sodium Hydroxide in water
  height_pipe = 50[um]  // height of pipes
  M_Na = 22.99[g/mol]  // Molar mass of Sodium
  N_Na = 100  // Number of released Sodium ions
  p0 = 10*300[Pa]  // Pressure level at the inlet
  pulse_duration = 1[ms]  // Pulse duration of the concentration at the Inlet 1.
  pulse_transition = 0[ms]  // Pulse transition of the concentration at the Inlet 1.
  Q = 5[ul/min]
  r_in_1 = 6[um]  // Radius of the circle that defines the turning geometry. See a representation in Fig 3 in ref bicen2013system
  r_out_1 = 2*radius_cylinder_1+r_in_1  // See Eq. (41) in ref bicen2013system
  radius_cylinder_1 = 20[um]  // Radius of the cilinder 1
  rho_Na = M_Na*c_Na  // Density of Sodium
  time_delta = 1[ms]  // Simulation time step
  time_simul = 5[s]  // Simulation duration
  v0 = 0.060545[m/s]  // Mean velocity at the inlet
  v0_chem_inlet = v0*2  // Mean velocity at the inlet of the chemical chamber
  volume_turn = pi*radius_cylinder_1^2*pi*(r_in_1+r_out_1)/2
  width_cylinder_chem_chamber_1 = 20[um]  // Length of the cylinder where the chemical reaction takes place.
  width_inlet_chem_chamber_1 = 2[um]  // Length of the inlet in the chemical reaction 1
  L_1 = 21[mm]  // Length of Pipe 1
  w_1 = 0.112726[mm]  // Length of Pipe 1

Functions
  rect1: Rectangle | lower = pulse_transition; upper = pulse_duration+pulse_transition; smooth = pulse_transition
  an1: Analytic | funcname = pulse; expr = rect1(t); args = t; argunit = s

Geometry
  geom1 "Ground_Plane" (2D, length unit mm)
    r1: Rectangle "Pipe_1" | size = {L_1, w_1}
    fin: Finalize "Form Union"

Materials
  mat1: Common "H2O (water) [liquid]" on all domains
    def: def "Basic"
      thermalconductivity = k_liquid_2(T)
      thermalexpansioncoefficient = (alpha_liquid_2(T)+(Tempref-293[K])*if(abs(T-Tempref)>1e-3,(alpha_liquid_2(T)-alpha_liquid_2(Tempref))/(T-Tempref),d(alpha_liquid_2(T),T)))/(1+alpha_liquid_2(Tempref)*(Tempref-293[K]))
      heatcapacity = C_liquid_2(T)
      HC = HC_liquid_2(T)
      VP = VP_liquid_2(T)
      density = rho_liquid_2(T)
      TD = TD_liquid_2(T)
      dynamicviscosity = eta_liquid_1(T)
      SurfF = SurfF(T)
      k_liquid_2: Piecewise | arg = T; pieces = {275.0, 370.0, -0.9003748+0.008387698*T^1-1.118205E-5*T^2}; argunit = K; fununit = W/(m*K)
      alpha_liquid_2: Piecewise
        arg = T
        pieces = 
          {273.15, 283.0, 0.01032507-7.62815E-5*T^1+1.412474E-7*T^2}
          {283.0, 373.16, -0.002464189354+1.947611E-5*T^1-5.049672E-8*T^2+4.616995E-11*T^3}
        argunit = K
        fununit = 1/K
      C_liquid_2: Piecewise | arg = T; pieces = {293.0, 373.16, 4035.840794+0.4923120336*T^1}; argunit = K; fununit = J/(kg*K)
      HC_liquid_2: Piecewise | arg = T; pieces = {293.0, 373.16, 72.6451184+0.008861615768*T^1}; argunit = K; fununit = J/(mol*K)
      VP_liquid_2: Piecewise | arg = T; pieces = {280.0, 600.0, (exp((-2.005121830e+03/T-5.565700000e-01*log10(T)+9.898790000e+00-1.111690086e+07/T^3)*log(10.0)))*1.333200000e+02}; argunit = K; fununit = Pa
      rho_liquid_2: Piecewise
        arg = T
        pieces = 
          {273.15, 283.0, 972.7578145+0.2084*T^1-4.0E-4*T^2}
          {283.0, 373.16, 345.28+5.749816*T^1-0.0157244*T^2+1.264375E-5*T^3}
        argunit = K
        fununit = kg/m^3
      TD_liquid_2: Piecewise | arg = T; pieces = {273.15, 333.16, 8.04E-8+2.0E-10*T^1}; argunit = K; fununit = m^2/s
      eta_liquid_1: Piecewise | arg = T; pieces = {265.0, 423.16, exp(1.47297892E+11/T^4 - 1.56916127E+09/T^3 + 6.52798499E+06/T^2 - 1.10421451E+04/T - 2.86320560E+00)}; argunit = K; fununit = Pa*s
      SurfF: Piecewise
        arg = T
        pieces = 
          {274.0, 568.0, 0.0774685638+2.071003E-4*T^1-1.23147E-6*T^2+2.344068E-9*T^3-3.033107E-12*T^4+1.758716E-15*T^5}
          {568.0, 647.0, -109.3735+0.9291756*T^1-0.003154159*T^2+5.351438E-6*T^3-4.539449E-9*T^4+1.540327E-12*T^5}
        argunit = K
        fununit = N/m
    ThermalExpansion: ThermalExpansion
      alphatan = CTE_liquid_2(T)
      dL = (dL_liquid_2(T)-dL_liquid_2(Tempref))/(1+dL_liquid_2(Tempref))
      dL_liquid_2: Piecewise
        arg = T
        pieces = 
          {273.15, 283.0, 0.008486347802-6.947021E-5*T^1+1.333373E-7*T^2}
          {283.0, 373.16, 0.2324466367-0.002030447*T^1+5.510259E-6*T^2-4.395999E-9*T^3}
        argunit = K
      CTE_liquid_2: Piecewise
        arg = T
        pieces = 
          {273.15, 283.0, -6.947321E-5+2.666746E-7*T^1}
          {283.0, 293.0, -0.01363714988+8.893977E-5*T^1-1.43925E-7*T^2}
          {293.0, 373.16, -0.002030450346+1.102052E-5*T^1-1.3188E-8*T^2}
        argunit = K
        fununit = 1/K

Physics
  spf: LaminarFlow on all domains
    dependent variable u = {u, v, w}
    fp1: FluidProperties (default)
    init1: init "Initial Values 1" (default)
    wallbc1: WallBC "Wall 1" (default)
    inl1: InletBoundary "Inlet 1" on boundaries 1 | BoundaryCondition = Pressure; p0 = p0
    out1: OutletBoundary "Outlet 1" on boundaries 4
  tds: DilutedSpecies "Transport of Diluted Species" on all domains
    dependent variable c
    cdm1: Fluid (default) | u_src = root.comp1.u; DiffusionMaterialList = mat1; D_c = D_NaOH
    nflx1: NoFlux (default)
    init1: init "Initial Values 1" (default)
    in1: Inflow on boundaries 1 | c0 = c_NaOH_ini*pulse(t)
    out1: Outflow on boundaries 4

Multiphysics
  rfd1: ReactingFlowDS "Reacting Flow, Diluted Species 1" on all domains | Fluid_physics = spf; Species_physics = tds

Mesh
  mesh1 "Mesh 1" (physics-controlled)
    size: MeshSizeDefault | table = cfd; hauto = 6

Studies
  std1 "Velocity"
    stat: Stationary | solve for = {spf}
  std2 "Concentration"
    time: Transient "Time Dependent"
      tlist = range(0,time_delta,time_simul)
      solve for = {tds}
      useinitsol = on
      initstudy = std1
      usesol = on
      notsolmethod = sol
      notstudy = std1

Solver configurations
  sol1 "Solution 1" (study std1)
    v1: Variables "Dependent Variables 1"
    s1: Stationary "Stationary Solver 1"
      fc1: FullyCoupled
      d1: Direct "Direct, fluid flow variables (spf)"
  sol2 "Solution 2" (study std2)
    v1: Variables "Dependent Variables 1"
    t1: Time "Time-Dependent Solver 1"
      fc1: FullyCoupled
      d1: Direct "Direct, concentrations (tds)"