// COMSOL Multiphysics 6.3.0.290 model "COMSOL_3D_CNN_Design_1_1_to_simulate.mph"
// Outline of the model tree
// Components: comp1 "2D_Pipe_1", comp3 "2D_Pipe_1_2_3", comp2 "3D_Pipe_1", comp4 "3D_Pipe_1_2_3"

Parameters
  c_CH3COOH_ini = 1[mol/L]  // Initial concentration at the inlet of the pipe.
  c_CH3COONa_ini = 0  // Initial concentration of the reaction product.
  c_H2O_ini = 0  // Initial concentration of water. It is zero as it is a produce of the reaction.
  c_Na = 10[mol/m^3]  // concentration of species.
  c_NaOH_ini = 1000[mol/m^3]  // Initial concentration at the inlet of the chemical chamber in the units of mol/m^3.
  c_Tartrazine_ini = 10^(-3)[mol/L]  // Initial concentration at the inlet of the chemical chamber in the units of mol/m^3.
  D_CH3COOH = 1.22*10^(-5)[cm^2/s]  // Diffusion coeff of Acetic Acid in water.
  D_CH3COONa = 1.09*10^(-5)[cm^2/s]  // Diffusion coeff of Sodium Acid in water.
  D_H2O = 2.29*10^(-9)[cm^2/s]  // Diffusion coeff of water in water.
  d_Na = 358[pm]  // Diameter of Sodium
  D_Na = 1.33e-9[m^2/s]  // Diffusion coeff of Na in H2O.
  D_NaOH = 5.3*10^(-9)[m^2/s]  // Diffusion coeff of Sodium Hydroxide in water
  D_Tartrazine = 4.9*10^(-10)[m^2/s]
  height_pipe = 50[um]  // height of pipes
  M_Na = 22.99[g/mol]  // Molar mass of Sodium
  N_Na = 100  // Number of released Sodium ions
  p0 = 600[Pa]  // Pressure level at the inlet
  pulse_duration = 1[ms]  // Pulse duration of the concentration at the Inlet 1.
  pulse_transition = 0[ms]  // Pulse transition of the concentration at the Inlet 1.
  Q = 5[ul/min]
  r_in_1 = 6[um]  // Radius of the circle that defines the turning geometry. See a representation in Fig 3 in ref bicen2013system
  r_out_1 = 2*radius_cylinder_1+r_in_1  // See Eq. (41) in ref bicen2013system
  radius_cylinder_1 = 20[um]  // Radius of the cilinder 1
  rho_Na = M_Na*c_Na  // Density of Sodium
  time_delta = 100[ms]  // Simulation time step
  time_simul = 20[s]  // Simulation duration
  L_1 = 21[mm]  // Length of Pipe 1
  w_1 = 0.112726[mm]  // Length of Pipe 1
  P_b23_x = 0.0209293[m]  // x-Coordinates for P_b23
  P_b23_y = 0.000155358[m]  // y-Coordinates for P_b23
  P_b33_x = 0.0209188[m]  // x-Coordinates for P_b23
  P_b33_y = -5.63629e-05[m]  // y-Coordinates for P_b23
  P_u222_x = 0.0210408[m]  // x-Coordinates for P_b23
  P_u222_y = 0.000267381[m]  // y-Coordinates for P_b23
  P_u322_x = 0.0210786[m]  // x-Coordinates for P_b23
  P_u322_y = -0.000175784[m]  // y-Coordinates for P_b23
  P_u210_x = 0.000379246[m]  // x-Coordinates for P_b23
  P_u210_y = 0.000267381[m]  // y-Coordinates for P_b23
  P_b21_x = 0.0004907[m]  // x-Coordinates for P_b23
  P_b21_y = 0.000155358[m]  // y-Coordinates for P_b23
  P_b31_x = 0.000501161[m]  // x-Coordinates for P_b23
  P_b31_y = -5.63629e-05[m]  // y-Coordinates for P_b23
  P_u310_x = 0.000341384[m]  // x-Coordinates for P_b23
  P_u310_y = -0.000175784[m]  // y-Coordinates for P_b23
  P_u31_x = 0.01071[m]  // x-Coordinates for P_b23
  P_u31_y = -0.0140484[m]  // y-Coordinates for P_b23
  n_Pipe_3_inlet_x = -0.598675  // x-Coordinates for n_Pipe_3_inlet
  n_Pipe_3_inlet_y = 0.800992  // y-Coordinates for n_Pipe_3_inlet
  n_Pipe_3_inlet_z = 0  // y-Coordinates for n_Pipe_3_inlet
  L_3 = 0.0350774[m]  // Length of Pipe 3
  w_3 = 0.000199475[m]  // width of Pipe 3
  L_2 = 0.0296231[m]  // Length of Pipe 2
  w_2 = 0.000158022[m]  // width of Pipe 2
  varphi_2 = 1.5657[rad]  // Angle of Pipe 2
  varphi_3 = 1.8579[rad]  // Angle of Pipe 3

Functions
  rect1: Rectangle [comp1] | lower = pulse_transition; upper = pulse_duration+pulse_transition; smooth = pulse_transition
  an1: Analytic [comp1] | funcname = pulse; expr = rect1(t); args = t; argunit = s
  rect2: Rectangle [comp2] | lower = pulse_transition; upper = pulse_duration+pulse_transition; smooth = pulse_transition
  an2: Analytic [comp2] | funcname = pulse; expr = rect2(t); args = t; argunit = s

Geometry
  geom1 "Pipe_1_2D" [comp1] (2D, length unit mm)
    r1: Rectangle "Pipe_1" | size = {L_1, w_1}
    csol1: ConvertToSolid "Solid 1" | input = r1
    fin: Finalize "Form Union"
  geom2 "3D_Pipe_1" [comp2] (3D, length unit m)
    wp1: WorkPlane | unite = on; workplane3d = on
      imp1: Import
        type = sequence
        sequence = geom1
        lengthunittype = sequence
        virtualgeometrytype = sequence
        objectstoimporttype = sequence
        layerstype = sequence
        componentsstype = sequence
        compattrtag = imp1.component
        cellstype = sequence
        arcrecognitiontype = sequence
        simplifytype = sequence
    ext1: Extrude | workplane = wp1; input = wp1; distance = height_pipe
    fin: Finalize "Form Union"
  geom3 "2D_Pipe_1_2_3" [comp3] (2D, length unit m)
    pol1: Polygon "polygon_upper"
      source = table
      table = 
        {0.000490699640697, 0.000155357904357}
        {0.01071, 0.0103227096306}
        {0.0209293003593, 0.000155357904357}
        {0.000490699640697, 0.000155357904357}
    pol2: Polygon "polygon_bottom"
      source = table
      table = 
        {0.000501161462504, -5.63629043571e-05}
        {0.01071, -0.013715177547}
        {0.0209188385375, -5.63629043571e-05}
        {0.000501161462504, -5.63629043571e-05}
    pol3: Polygon "polygon_outer"
      source = table
      table = 
        {0, 9.8995e-05}
        {0.00021, 9.8995e-05}
        {0.01071, 0.0105456194627}
        {0.02121, 9.8995e-05}
        {0.02142, 9.8995e-05}
        {0.02142, 0}
        {0.02121, 0}
        {0.01071, -0.0140483712443}
        {0.00021, 0}
        {0, 0}
    dif1: Difference | input = pol3; input2 = pol1, pol2
    csol1: ConvertToSolid | input = dif1
    ls1: LineSegment "outlet_pipe_2"
      specify1 = coord
      coord1 = {P_b23_x, P_b23_y}
      specify2 = coord
      coord2 = {P_u222_x, P_u222_y}
    ls2: LineSegment "outlet_pipe_3"
      specify1 = coord
      coord1 = {P_b33_x, P_b33_y}
      specify2 = coord
      coord2 = {P_u322_x, P_u322_y}
    ls3: LineSegment "inlet_pipe_2"
      specify1 = coord
      coord1 = {P_b21_x, P_b21_y}
      specify2 = coord
      coord2 = {P_u210_x, P_u210_y}
    ls4: LineSegment "inlet_pipe_3"
      specify1 = coord
      coord1 = {P_b31_x, P_b31_y}
      specify2 = coord
      coord2 = {P_u310_x, P_u310_y}
    ls5: LineSegment "inlet_pipe_1"
      specify1 = coord
      coord1 = {P_b21_x, P_b21_y}
      specify2 = coord
      coord2 = {P_b31_x, P_b31_y}
    ls6: LineSegment "outlet_pipe_1"
      specify1 = coord
      coord1 = {P_b23_x, P_b23_y}
      specify2 = coord
      coord2 = {P_b33_x, P_b33_y}
    fin: Finalize "Form Union"
  geom4 "Geometry 4" [comp4] (3D, length unit m)
    wp1: WorkPlane | unite = on; workplane3d = on
      imp1: Import
        type = sequence
        sequence = geom3
        lengthunittype = sequence
        virtualgeometrytype = sequence
        objectstoimporttype = sequence
        layerstype = sequence
        componentsstype = sequence
        compattrtag = imp1.component
        cellstype = sequence
        arcrecognitiontype = sequence
        simplifytype = sequence
    ext1: Extrude | workplane = wp1; input = wp1; distance = height_pipe
    int1: Intersection | input = ext1
    fin: Finalize "Form Union"

Materials
  mat1: Common "H2O (water) [liquid]" [comp1] on all domains
    def: def "Basic"
      thermalconductivity = k_liquid_2(T)
      thermalexpansioncoefficient = (alpha_liquid_2(T)+(Tempref-293[K])*if(abs(T-Tempref)>1e-3,(alpha_liquid_2(T)-alpha_liquid_2(Tempref))/(T-Tempref),d(alpha_liquid_2(T),T)))/(1+alpha_liquid_2(Tempref)*(Tempref-293[K]))
      heatcapacity = C_liquid_2(T)
      HC = HC_liquid_2(T)
      VP = VP_liquid_2(T)
      density = rho_liquid_2(T)
      TD = TD_liquid_2(T)
      dynamicviscosity = eta_liquid_1(T)
      SurfF = SurfF(T)
      k_liquid_2: Piecewise | arg = T; pieces = {275.0, 370.0, -0.9003748+0.008387698*T^1-1.118205E-5*T^2}; argunit = K; fununit = W/(m*K)
      alpha_liquid_2: Piecewise
        arg = T
        pieces = 
          {273.15, 283.0, 0.01032507-7.62815E-5*T^1+1.412474E-7*T^2}
          {283.0, 373.16, -0.002464189354+1.947611E-5*T^1-5.049672E-8*T^2+4.616995E-11*T^3}
        argunit = K
        fununit = 1/K
      C_liquid_2: Piecewise | arg = T; pieces = {293.0, 373.16, 4035.840794+0.4923120336*T^1}; argunit = K; fununit = J/(kg*K)
      HC_liquid_2: Piecewise | arg = T; pieces = {293.0, 373.16, 72.6451184+0.008861615768*T^1}; argunit = K; fununit = J/(mol*K)
      VP_liquid_2: Piecewise | arg = T; pieces = {280.0, 600.0, (exp((-2.005121830e+03/T-5.565700000e-01*log10(T)+9.898790000e+00-1.111690086e+07/T^3)*log(10.0)))*1.333200000e+02}; argunit = K; fununit = Pa
      rho_liquid_2: Piecewise
        arg = T
        pieces = 
          {273.15, 283.0, 972.7578145+0.2084*T^1-4.0E-4*T^2}
          {283.0, 373.16, 345.28+5.749816*T^1-0.0157244*T^2+1.264375E-5*T^3}
        argunit = K
        fununit = kg/m^3
      TD_liquid_2: Piecewise | arg = T; pieces = {273.15, 333.16, 8.04E-8+2.0E-10*T^1}; argunit = K; fununit = m^2/s
      eta_liquid_1: Piecewise | arg = T; pieces = {265.0, 423.16, exp(1.47297892E+11/T^4 - 1.56916127E+09/T^3 + 6.52798499E+06/T^2 - 1.10421451E+04/T - 2.86320560E+00)}; argunit = K; fununit = Pa*s
      SurfF: Piecewise
        arg = T
        pieces = 
          {274.0, 568.0, 0.0774685638+2.071003E-4*T^1-1.23147E-6*T^2+2.344068E-9*T^3-3.033107E-12*T^4+1.758716E-15*T^5}
          {568.0, 647.0, -109.3735+0.9291756*T^1-0.003154159*T^2+5.351438E-6*T^3-4.539449E-9*T^4+1.540327E-12*T^5}
        argunit = K
        fununit = N/m
    ThermalExpansion: ThermalExpansion
      alphatan = CTE_liquid_2(T)
      dL = (dL_liquid_2(T)-dL_liquid_2(Tempref))/(1+dL_liquid_2(Tempref))
      dL_liquid_2: Piecewise
        arg = T
        pieces = 
          {273.15, 283.0, 0.008486347802-6.947021E-5*T^1+1.333373E-7*T^2}
          {283.0, 373.16, 0.2324466367-0.002030447*T^1+5.510259E-6*T^2-4.395999E-9*T^3}
        argunit = K
      CTE_liquid_2: Piecewise
        arg = T
        pieces = 
          {273.15, 283.0, -6.947321E-5+2.666746E-7*T^1}
          {283.0, 293.0, -0.01363714988+8.893977E-5*T^1-1.43925E-7*T^2}
          {293.0, 373.16, -0.002030450346+1.102052E-5*T^1-1.3188E-8*T^2}
        argunit = K
        fununit = 1/K
  mat2: Common "H2O (water) [liquid]" [comp2] on all domains
    // same settings as mat1
  mat3: Common "H2O (water) [liquid]" [comp4] on all domains
    // same settings as mat1

Physics
  spf2: LaminarFlow [geom2] on all domains
    dependent variable u2 = {u2, v2, w2}
    fp1: FluidProperties (default) | rho_mat = from_mat; mu_mat = from_mat
    init1: init "Initial Values 1" (default)
    wallbc1: WallBC "Wall 1" (default)
    inl1: InletBoundary "Inlet 1" on boundaries 1 | BoundaryCondition = Pressure; p0 = p0
    out1: OutletBoundary "Outlet 1" on boundaries 6
  spf: LaminarFlow [geom1] on all domains
    dependent variable u = {u, v, w}
    fp1: FluidProperties (default)
    init1: init "Initial Values 1" (default)
    wallbc1: WallBC "Wall 1" (default)
    inl1: InletBoundary "Inlet 1" on boundaries 1 | BoundaryCondition = Pressure; p0 = p0
    out1: OutletBoundary "Outlet 1" on boundaries 4
  tds: DilutedSpecies "Transport of Diluted Species" [geom1] on all domains
    dependent variable c
    cdm1: Fluid (default)
      u_src = root.comp1.u
      DiffusionCoefficientSource = chem
      DiffusionMaterialList = none
      D_c = D_Tartrazine
    nflx1: NoFlux (default)
    init1: init "Initial Values 1" (default)
    in1: Inflow on boundaries 1 | c0 = c_Tartrazine_ini
    out1: Outflow on boundaries 4
  tds2: DilutedSpecies "Transport of Diluted Species 2" [geom2] on all domains
    dependent variable c2
    cdm1: Fluid (default) | DiffusionCoefficientSource = chem; D_c2 = D_Tartrazine; Dchem_c2 = D_Tartrazine
    nflx1: NoFlux (default)
    init1: init "Initial Values 1" (default)
    in1: Inflow on boundaries 1 | c0 = c_Tartrazine_ini
    out1: Outflow on boundaries 6
  spf3: LaminarFlow [geom4] on all domains
    dependent variable u3 = {u3, v3, w3}
    fp1: FluidProperties (default)
    init1: init "Initial Values 1" (default)
    wallbc1: WallBC "Wall 1" (default)
    inl1: InletBoundary "Inlet 1" on boundaries 1 | BoundaryCondition = Pressure; p0 = p0
    out1: OutletBoundary "Outlet 1" on boundaries 36
  tds3: DilutedSpecies "Transport of Diluted Species 3" [geom4] on all domains
    dependent variable c3
    cdm1: Fluid (default) | DiffusionCoefficientSource = chem; Dchem_c3 = D_Tartrazine
    nflx1: NoFlux (default)
    init1: init "Initial Values 1" (default)
    in1: Inflow on boundaries 1 | c0 = c_Tartrazine_ini
    out1: Outflow on boundaries 36

Multiphysics
  rfd1: ReactingFlowDS "Reacting Flow, Diluted Species 1" [comp1] on all domains
    Fluid_physics = spf
    Species_physics = tds
  rfd2: ReactingFlowDS "Reacting Flow, Diluted Species 2" [comp2] on all domains
    Fluid_physics = spf2
    Species_physics = tds2
  rfd3: ReactingFlowDS "Reacting Flow, Diluted Species 3" [comp4] on all domains
    Fluid_physics = spf3
    Species_physics = tds3

Mesh
  mesh1 "Mesh 1" [geom1] (physics-controlled)
    size: MeshSizeDefault | table = cfd; hauto = 6
  mesh2 "Mesh 2" [geom2] (physics-controlled)
    size: MeshSizeDefault | table = cfd; hauto = 6
  mesh3 "Mesh 3" [geom3] (physics-controlled)
  mesh4 "Mesh 4" [geom4] (physics-controlled)
    size: MeshSizeDefault | table = cfd; hauto = 6

Studies
  std1 "Velocity_2D_Pipe_1"
    stat: Stationary | solve for = {spf}
  std2 "Concentration_2D_Pipe_1"
    time: Transient "Time Dependent"
      tlist = range(0,time_delta,time_simul)
      solve for = {tds}
      useinitsol = on
      initstudy = std1
      usesol = on
      notsolmethod = sol
      notstudy = std1
  std3 "Velocity_3D_Pipe_1_single"
    stat: Stationary | solve for = {spf2}
  std4 "Concentration_3D_Pipe_1_single"
    time: Transient "Time Dependent"
      tlist = range(0,time_delta,time_simul)
      solve for = {tds2}
      useinitsol = on
      initmethod = sol
      initstudy = std3
      usesol = on
      notsolmethod = sol
      notstudy = std3
  std5 "Velocity_3D_Pipe_1_2_3"
    stat: Stationary | solve for = {spf3}
  std6 "Concentration_3D_Pipe_1_2_3"
    time: Transient "Time Dependent"
      tlist = range(0,time_delta,time_simul)
      solve for = {tds3}
      useinitsol = on
      initmethod = sol
      initstudy = std5
      usesol = on
      notsolmethod = sol
      notstudy = std5

Solver configurations
  sol1 "Solution 1" (study std1)
    v1: Variables "Dependent Variables 1"
    s1: Stationary "Stationary Solver 1"
      fc1: FullyCoupled
      d1: Direct "Direct, fluid flow variables (spf)"
  sol2 "Solution 2" (study std2)
    v1: Variables "Dependent Variables 1"
    t1: Time "Time-Dependent Solver 1"
      fc1: FullyCoupled
      d1: Direct "Direct, concentrations (tds)"
  sol3 "Solution 3" (study std3)
    v1: Variables "Dependent Variables 1"
    s1: Stationary "Stationary Solver 1"
      fc1: FullyCoupled
      i1: Iterative "AMG, fluid flow variables (spf2)"
        mg1: Multigrid
  sol4 "Solution 4" (study std4)
    v1: Variables "Dependent Variables 1"
    t1: Time "Time-Dependent Solver 1"
      fc1: FullyCoupled
      i1: Iterative "AMG, concentrations (tds2)"
        mg1: Multigrid
  sol5 "Solution 5" (study std5)
    v1: Variables "Dependent Variables 1"
    s1: Stationary "Stationary Solver 1"
      fc1: FullyCoupled
      d1: Direct "Direct, fluid flow variables (spf3)"
  sol6 "Solution 6" (study std6)
    v1: Variables "Dependent Variables 1"
    t1: Time "Time-Dependent Solver 1"
      fc1: FullyCoupled
      d1: Direct "Direct, concentrations (tds3)"

Datasets
  dset1: Solution | solution = sol1
  dset2: Solution | solution = sol2
  dset4: Solution | solution = sol3
  surf1: Surface "Exterior Walls" on boundaries 2-5 | data = dset4
  dset6: Solution | solution = sol4
  cln2: CutLine3D "Concentration_Cut_Line_3D" | data = dset6; genpoints = {{L_1, w_1/2, 0}, {L_1, w_1/2, height_pipe}}
  cln3: CutLine3D "Velocity_Cut_Line_3D 1" | data = dset4; genpoints = {{L_1, w_1/2, 0}, {L_1, w_1/2, height_pipe}}
  dset9: Solution | solution = sol5
  dset10: Solution | solution = sol6
  dset11: Solution | solution = sol6
  dset12: Solution | solution = sol6

Derived values
  av1: AvLine "2D_Pipe_1_single_Concentration_Line_Average" on boundaries 4 | data = dset2; table = new; expr = c
  av3: AvLine "3D_Pipe_1_single_Concentration_Line_Average" | data = cln2; table = new; expr = c2
  av2: AvSurface "3D_Pipe_1_single_Concentration_Surface_Average" on boundaries 6 | data = dset6; table = new; expr = c2
  int1: IntSurface "3D_Pipe_1_single_Q_Volumetric_Flow" on boundaries 1
    data = dset4
    table = new
    expr = -(u2*nx + v2*ny + w2*nz)*6e10
    unit = m^3/s
    descr = Volumetric flow
  av4: AvSurface "3D_Average_velocity" on boundaries 6 | data = dset4; table = new; expr = (u2*nx + v2*ny + w2*nz)
  av5: AvLine "3D_Velocity_Line_Average 1" | data = cln3; table = new; expr = u2
  int3: IntSurface "3D_Pipe_1_2_3_Inlet_Q_Volumetric_Flow" on boundaries 1
    data = dset9
    table = new
    expr = -(u3*nx + v3*ny + w3*nz)*6e10
  int6: IntSurface "3D_Pipe_1_Inlet_Q_Volumetric_Flow" on boundaries 16
    data = dset9
    table = new
    expr = (u3*1 + v3*0 + w3*0)*6e10
    unit = m^3/s
    descr = Inflow to Pipe 1 in uL/min
  int5: IntSurface "3D_Pipe_2_Inlet_Q_Volumetric_Flow" on boundaries 12
    data = dset9
    table = new
    expr = (u3*nx + v3*ny + w3*nz)*6e10
    unit = m^3/s
    descr = Inflow to Pipe 1 in uL/min
  int4: IntSurface "3D_Pipe_3_Inlet_Q_Volumetric_Flow" on boundaries 8
    data = dset9
    table = new
    expr = -(u3*nx + v3*ny + w3*nz)*6e10
    unit = m^3/s
    descr = Inflow to Pipe 1 in uL/min
  av6: AvSurface "3D_Pipe_1_Inlet_Concentration_Surface_Average" on boundaries 16 | data = dset12; table = new; expr = c3
  av10: AvSurface "3D_Pipe_2_Inlet_Concentration_Surface_Average" on boundaries 12 | data = dset12; table = new; expr = c3
  av11: AvSurface "3D_Pipe_3_Inlet_Concentration_Surface_Average" on boundaries 8 | data = dset12; table = new; expr = c3
  av7: AvSurface "3D_Pipe_1_Outlet_Concentration_Surface_Average" on boundaries 27 | data = dset12; table = new; expr = c3
  av8: AvSurface "3D_Pipe_2_Outlet_Concentration_Surface_Average" on boundaries 31 | data = dset12; table = new; expr = c3
  av9: AvSurface "3D_Pipe_3_Outlet_Concentration_Surface_Average" on boundaries 28 | data = dset12; table = new; expr = c3
  av12: AvSurface "3D_Pipe_1_Inlet_Pressure_Surface_Average" on boundaries 16 | data = dset12; table = new; expr = p3
  av13: AvSurface "3D_Pipe_2_Inlet_Pressure_Surface_Average" on boundaries 12 | data = dset12; table = new; expr = p3
  av14: AvSurface "3D_Pipe_3_Inlet_Pressure_Surface_Average" on boundaries 8 | data = dset12; table = new; expr = p3

Plots
  pg1: PlotGroup2D "Velocity_1D_Pipe_1 (spf)" | data = dset1
    surf1: Surface | expr = spf.U
  pg2: PlotGroup2D "Pressure_1D_Pipe_1 (spf)" | data = dset1
    con1: Contour | expr = p; levelrounding = off
  pg3: PlotGroup2D "Concentration_1D_Pipe_1 (tds)" | data = dset2
    surf1: Surface | expr = c
    arws1: ArrowSurface | expr = {tds.tflux_cx, tds.tflux_cy}; xnumber = 10; ynumber = 10
      sel1: Selection on domains 1
  pg5: PlotGroup3D "Velocity_2D_Pipe_1 (spf2)" | data = dset4
    slc1: Slice | expr = spf2.U; quickxnumber = 100
  pg6: PlotGroup3D "Pressure_2D_Pipe_1 (spf2)" | data = surf1
    surf1: Surface | expr = p2
      tran1: Transparency
  pg8: PlotGroup3D "Concentration_2D, Surface (tds2)" | data = dset6; typeintitle = off
    surf1: Surface | expr = c2
  pg13: PlotGroup3D "Velocity_3D_Pipe_1_2_3 (spf3)" | data = dset9
    slc1: Slice | expr = spf3.U; quickxnumber = 100
  pg15: PlotGroup3D "Concentration, Surface (tds3)" | data = dset12; typeintitle = off
    surf1: Surface | data = dset12; expr = c3
  pg18: PlotGroup3D "3D Plot Group 18" | data = dset9
    slc1: Slice | expr = p3; quickxnumber = 100